// COMSOL Multiphysics 6.3.0.290 model "MLI Simulation.mph"
// Outline of the model tree

Parameters
  N_MLI = 20
  e_couche = 0.05[mm]
  e = N_MLI*e_couche
  R_s = N_MLI/(epsilon_feuille*sigma_SB*(Tint+Text)*(Tint^2+Text^2))
  k_eff = e_couche*epsilon_feuille*sigma_SB*(Tint+Text)*(Tint^2+Text^2)
  sigma_SB = 5.67e-8[W/(m^2*K^4)]
  epsilon_feuille = 0.03
  Tint = 293.15[K]
  Text = 4[K]
  m_MLI = N_MLI*30[g/m^2]*138[m^2]
  eps_eff = epsilon_feuille/(2*N_MLI)
  Q_tot = eps_eff*sigma_SB*138[m^2]*(Tint^4-Text^4)

Geometry
  geom1 "Geometry 1" (2D, length unit m)
    r1: Rectangle | size = {1, e}
    fin: Finalize "Form Union"

Materials
  mat1: Common "MLI équivalent" on domains 1
    def: def "Basic"
      thermalconductivity = k_eff
      density = 60
      heatcapacity = 1200

Physics
  ht: HeatTransfer "Heat Transfer in Solids" on domains 1
    dependent variable T
    solid1: SolidHeatTransferModel "Solid 1" (default)
    init1: init "Initial Values 1" (default)
    ins1: ThermalInsulation (default)
    temp1: TemperatureBoundary "Tint" on boundaries 2
    temp2: TemperatureBoundary "Text" on boundaries 3 | T0 = 4[K]

Mesh
  mesh1 "Mesh 1"
    size: MeshSizeDefault | hauto = 2
    auto_f1: FreeTri "Free Triangular 1" on entire geometry

Studies
  std1 "Study 1"
    param: Parametric "Parametric Sweep" | pname = N_MLI; plistarr = 5, 10, 15, 20, 25, 30, 40, 50
    stat: Stationary

Solver configurations
  sol1 "Solution 1" (study std1)
    v1: Variables "Dependent Variables 1"
    s1: Stationary "Stationary Solver 1"
      fc1: FullyCoupled
      d1: Direct "Direct, heat transfer variables (ht)"
  sol2 "Parametric Solutions 1" (study std1)

Datasets
  dset1: Solution | solution = sol1
  dset2: Solution | solution = sol2

Derived values
  int1: IntLine "Line Integration 1" on boundaries 3
    data = dset2
    table = tbl3
    expr = {eps_eff, Q_tot, m_MLI}
    unit = {m, W*m, kg*m}

Tables
  tbl3: Table
    // Line Integration 1
    N_MLI | eps_eff (m) | Q_tot (W*m) | m_MLI (kg*m)
    5 | 0.003 | 173.358 | 20.7
    10 | 0.0015 | 86.6788 | 41.4
    15 | 0.001 | 57.7859 | 62.1
    20 | 0.00075 | 43.3394 | 82.8
    25 | 0.0006 | 34.6715 | 103.5
    30 | 0.0005 | 28.8929 | 124.2
    40 | 0.000375 | 21.6697 | 165.6
    50 | 0.0003 | 17.3358 | 207

Plots
  pg1: PlotGroup2D "Temperature (ht)" | data = dset2
    surf1: Surface | expr = T
  pg2: PlotGroup1D "1D Plot Group 2" | data = dset1; xlabel = N_MLI; ylabel = Q_traversant
    tblp1: Table "Table Graph 1" | table = tbl3; xaxisdata = auto

Exports
  tbl1: Table | table = tbl3; filename = C:\Users\Mouath\Desktop\Stage TUNSA\Total Normal Heat Flux.csv